# OpenSim document version 40600
ControlSet Control Set:
  ControlLinear [values shared by the 6 below unless stated]: is_model_control=true extrapolate=true default_min=0.02
      default_max=1 filter_on=false use_steps=false kp=100 kv=20
    x_nodes: ControlLinearNode: t=1 value=0.01989999
  ControlLinear TRIlong
  ControlLinear TRIlat
  ControlLinear TRImed
  ControlLinear BIClong
  ControlLinear BICshort
  ControlLinear BRA
